/BATCH
! /COM,ANSYS RELEASE 2021 R1           BUILD 21.1      UP20201109       15:50:34
/input,menust,tmp,''
! /GRA,POWER
! /GST,ON
! /PLO,INFO,3
! /GRO,CURL,ON
! /CPLANE,1
! /REPLOT,RESIZE
WPSTYLE,,,,,,,,0
! /REPLOT,RESIZE
!*

*DO,i,1,500,1

*DIM,samples,ARRAY,9,500
samples(1,1) = 86000.0,1093.0,-1620.0,304.0,3.3,1.8,197000000000.0,82.0,45.0
samples(1,2) = 89000.0,2180.0,3000.0,54.0,3.6,1.0,170000000000.0,90.0,25.0
samples(1,3) = 97000.0,-1664.0,1446.0,139.0,2.9,1.8,194000000000.0,72.0,45.0
samples(1,4) = 82000.0,-1434.0,-1538.0,227.0,3.7,1.6,172000000000.0,92.0,40.0
samples(1,5) = 70000.0,860.0,1141.0,53.0,3.1,2.0,188000000000.0,78.0,50.0
samples(1,6) = 80000.0,-1269.0,-1027.0,219.0,3.7,2.0,157000000000.0,92.0,50.0
samples(1,7) = 56000.0,-426.0,-1591.0,255.0,2.2,1.4,151000000000.0,55.0,35.0
samples(1,8) = 76000.0,1853.0,-1853.0,315.0,3.4,1.2,171000000000.0,85.0,30.0
samples(1,9) = 97000.0,2063.0,72.0,2.0,3.6,1.9,190000000000.0,90.0,48.0
samples(1,10) = 53000.0,596.0,-1221.0,296.0,2.8,1.6,152000000000.0,70.0,40.0
samples(1,11) = 77000.0,2100.0,-848.0,338.0,2.8,1.4,175000000000.0,70.0,35.0
samples(1,12) = 85000.0,3140.0,-220.0,356.0,2.4,1.1,184000000000.0,60.0,28.0
samples(1,13) = 75000.0,-2695.0,672.0,166.0,3.3,1.1,181000000000.0,82.0,28.0
samples(1,14) = 51000.0,423.0,951.0,66.0,2.4,2.0,191000000000.0,60.0,50.0
samples(1,15) = 79000.0,1055.0,1453.0,54.0,3.3,1.8,179000000000.0,82.0,45.0
samples(1,16) = 62000.0,-1578.0,-194.0,187.0,2.1,1.6,192000000000.0,52.0,40.0
samples(1,17) = 69000.0,-1331.0,620.0,155.0,3.3,1.9,180000000000.0,82.0,48.0
samples(1,18) = 52000.0,168.0,1919.0,85.0,4.0,1.1,158000000000.0,100.0,28.0
samples(1,19) = 93000.0,-2439.0,608.0,166.0,2.8,1.5,152000000000.0,70.0,38.0
samples(1,20) = 89000.0,-1118.0,-1431.0,232.0,3.3,2.0,154000000000.0,82.0,50.0
samples(1,21) = 78000.0,524.0,-1829.0,286.0,4.0,1.7,185000000000.0,100.0,42.0
samples(1,22) = 97000.0,-1912.0,-512.0,195.0,3.7,2.0,178000000000.0,92.0,50.0
samples(1,23) = 55000.0,-1017.0,474.0,155.0,3.8,2.0,200000000000.0,95.0,50.0
samples(1,24) = 77000.0,290.0,2061.0,82.0,2.6,1.5,191000000000.0,65.0,38.0
samples(1,25) = 75000.0,-766.0,-2670.0,254.0,3.6,1.1,151000000000.0,90.0,28.0
samples(1,26) = 51000.0,2120.0,-148.0,356.0,2.9,1.0,199000000000.0,72.0,25.0
samples(1,27) = 80000.0,-1428.0,927.0,147.0,2.2,1.9,162000000000.0,55.0,48.0
samples(1,28) = 100000.0,2030.0,-2507.0,309.0,2.6,1.3,199000000000.0,65.0,32.0
samples(1,29) = 97000.0,-2278.0,-1717.0,217.0,3.6,1.4,179000000000.0,90.0,35.0
samples(1,30) = 56000.0,-1517.0,1415.0,137.0,3.6,1.1,159000000000.0,90.0,28.0
samples(1,31) = 66000.0,-1930.0,-900.0,205.0,3.3,1.3,184000000000.0,82.0,32.0
samples(1,32) = 90000.0,-3034.0,-2204.0,216.0,2.5,1.0,172000000000.0,62.0,25.0
samples(1,33) = 83000.0,-2373.0,-1600.0,214.0,3.2,1.2,194000000000.0,80.0,30.0
samples(1,34) = 71000.0,-333.0,-1890.0,260.0,3.9,1.5,163000000000.0,98.0,38.0
samples(1,35) = 68000.0,1487.0,-1080.0,324.0,3.8,1.5,199000000000.0,95.0,38.0
samples(1,36) = 89000.0,-853.0,-3184.0,255.0,3.2,1.1,182000000000.0,80.0,28.0
samples(1,37) = 52000.0,1192.0,745.0,32.0,3.1,1.5,188000000000.0,78.0,38.0
samples(1,38) = 68000.0,1433.0,-579.0,338.0,2.5,1.8,199000000000.0,62.0,45.0
samples(1,39) = 66000.0,-696.0,-1812.0,249.0,3.1,1.4,191000000000.0,78.0,35.0
samples(1,40) = 99000.0,-254.0,-2901.0,265.0,3.6,1.4,199000000000.0,90.0,35.0
samples(1,41) = 60000.0,-879.0,1725.0,117.0,2.4,1.3,179000000000.0,60.0,32.0
samples(1,42) = 95000.0,81.0,2316.0,88.0,2.9,1.7,197000000000.0,72.0,42.0
samples(1,43) = 86000.0,3367.0,1226.0,20.0,2.4,1.0,195000000000.0,60.0,25.0
samples(1,44) = 81000.0,-1189.0,-1148.0,224.0,3.6,2.0,164000000000.0,90.0,50.0
samples(1,45) = 56000.0,-1031.0,896.0,139.0,3.8,1.7,160000000000.0,95.0,42.0
samples(1,46) = 81000.0,-2572.0,-1545.0,211.0,2.9,1.1,197000000000.0,72.0,28.0
samples(1,47) = 69000.0,1528.0,1070.0,35.0,2.7,1.5,184000000000.0,68.0,38.0
samples(1,48) = 64000.0,807.0,-1900.0,293.0,2.5,1.3,188000000000.0,62.0,32.0
samples(1,49) = 50000.0,-1698.0,-299.0,190.0,3.2,1.2,184000000000.0,80.0,30.0
samples(1,50) = 57000.0,-827.0,887.0,133.0,2.3,1.9,166000000000.0,57.0,48.0
samples(1,51) = 73000.0,1237.0,-2779.0,294.0,2.0,1.0,181000000000.0,50.0,25.0
samples(1,52) = 68000.0,1586.0,-485.0,343.0,3.0,1.7,194000000000.0,75.0,42.0
samples(1,53) = 94000.0,-1831.0,1380.0,143.0,3.3,1.7,158000000000.0,82.0,42.0
samples(1,54) = 98000.0,-2179.0,-463.0,192.0,3.7,1.8,156000000000.0,92.0,45.0
samples(1,55) = 53000.0,531.0,-1251.0,293.0,3.6,1.6,154000000000.0,90.0,40.0
samples(1,56) = 94000.0,3458.0,1839.0,28.0,3.8,1.0,183000000000.0,95.0,25.0
samples(1,57) = 59000.0,-2120.0,529.0,166.0,2.2,1.1,185000000000.0,55.0,28.0
samples(1,58) = 92000.0,-2789.0,1015.0,160.0,4.0,1.3,153000000000.0,100.0,32.0
samples(1,59) = 68000.0,-919.0,1592.0,120.0,2.2,1.5,152000000000.0,55.0,38.0
samples(1,60) = 61000.0,-2259.0,0.0,180.0,3.1,1.1,169000000000.0,78.0,28.0
samples(1,61) = 84000.0,3499.0,-61.0,359.0,2.3,1.0,166000000000.0,57.0,25.0
samples(1,62) = 100000.0,479.0,2073.0,77.0,2.6,1.9,153000000000.0,65.0,48.0
samples(1,63) = 71000.0,985.0,-2438.0,292.0,3.0,1.1,194000000000.0,75.0,28.0
samples(1,64) = 92000.0,-992.0,-3703.0,255.0,3.8,1.0,182000000000.0,95.0,25.0
samples(1,65) = 81000.0,0.0,1976.0,90.0,3.9,1.7,162000000000.0,98.0,42.0
samples(1,66) = 56000.0,-909.0,1864.0,116.0,3.7,1.1,186000000000.0,92.0,28.0
samples(1,67) = 81000.0,-1303.0,1018.0,142.0,3.4,2.0,176000000000.0,85.0,50.0
samples(1,68) = 99000.0,1949.0,-1125.0,330.0,3.7,1.8,200000000000.0,92.0,45.0
samples(1,69) = 78000.0,1356.0,2551.0,62.0,3.2,1.1,162000000000.0,80.0,28.0
samples(1,70) = 91000.0,3180.0,-2065.0,327.0,3.4,1.0,198000000000.0,85.0,25.0
samples(1,71) = 51000.0,-1751.0,-708.0,202.0,2.5,1.1,175000000000.0,62.0,28.0
samples(1,72) = 91000.0,2341.0,1298.0,29.0,3.7,1.4,157000000000.0,92.0,35.0
samples(1,73) = 84000.0,-1756.0,1055.0,149.0,3.6,1.7,189000000000.0,90.0,42.0
samples(1,74) = 94000.0,1552.0,-1128.0,324.0,3.1,2.0,194000000000.0,78.0,50.0
samples(1,75) = 80000.0,1436.0,-2591.0,299.0,2.1,1.1,194000000000.0,52.0,28.0
samples(1,76) = 88000.0,1301.0,-1347.0,314.0,2.3,1.9,183000000000.0,57.0,48.0
samples(1,77) = 55000.0,-1555.0,446.0,164.0,3.3,1.4,188000000000.0,82.0,35.0
samples(1,78) = 57000.0,-0.0,-1839.0,270.0,2.9,1.3,182000000000.0,72.0,32.0
samples(1,79) = 62000.0,1509.0,-105.0,356.0,3.4,1.7,153000000000.0,85.0,42.0
samples(1,80) = 96000.0,-3005.0,749.0,166.0,2.7,1.3,185000000000.0,68.0,32.0
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samples(1,500) = 95000.0,-1174.0,3058.0,111.0,3.8,1.2,169000000000.0,95.0,30.0

/NOPR
KEYW,PR_SET,1
KEYW,PR_STRUC,1
KEYW,PR_THERM,0
KEYW,PR_FLUID,0
KEYW,PR_ELMAG,0
KEYW,MAGNOD,0
KEYW,MAGEDG,0
KEYW,MAGHFE,0
KEYW,MAGELC,0
KEYW,PR_MULTI,0
/GO
!*
! /COM,
! /COM,Preferences for GUI filtering have been set to display:
! /COM,  Structural
!*

! Disable popups.
/UIS,MSGPOP,4

! Create keypoints at corners.
/PREP7
FLST,3,1,8
FITEM,3,0,0,0
K, ,P51X
FLST,3,1,8
FITEM,3,samples(5,i,1),0,0
K, ,P51X
FLST,3,1,8
FITEM,3,samples(5,i,1),samples(6,i,1),0
K, ,P51X
FLST,3,1,8
FITEM,3,0,samples(6,i,1),0
K, ,P51X

! Create lines.
!LSTR,       1,       2
!LSTR,       2,       3
!LSTR,       3,       4
!LSTR,       4,       1

! Create area.
FLST,2,4,3
FITEM,2,1
FITEM,2,2
FITEM,2,3
FITEM,2,4
A,P51X

!  Define element type.
ET,1,PLANE182

KEYOPT,1,1,0
KEYOPT,1,3,3
KEYOPT,1,6,0

!  Define thickness.
R,1,1,

!  Define material properties.
MPTEMP,,,,,,,,
MPTEMP,1,0
MPDATA,EX,1,,samples(7,i,1)
MPDATA,PRXY,1,,0.3

!  Create the mesh.
FLST,5,2,4,ORDE,2
FITEM,5,1
FITEM,5,3
CM,_Y,LINE
LSEL, , , ,P51X
CM,_Y1,LINE
CMSEL,,_Y

LESIZE,_Y1, , ,samples(8,i,1)-1, , , , ,1

FLST,5,2,4,ORDE,2
FITEM,5,2
FITEM,5,4
CM,_Y,LINE
LSEL, , , ,P51X
CM,_Y1,LINE
CMSEL,,_Y

LESIZE,_Y1, , ,samples(9,i,1)-1, , , , ,1

MSHAPE,0,2D
MSHKEY,0

CM,_Y,AREA
ASEL, , , ,       1
CM,_Y1,AREA
CHKMSH,'AREA'
CMSEL,S,_Y

AMESH,_Y1

CMDELE,_Y
CMDELE,_Y1
CMDELE,_Y2

! NPLOT
! /PNUM,KP,0
! /PNUM,LINE,0
! /PNUM,AREA,0
! /PNUM,VOLU,0
! /PNUM,NODE,1
! /PNUM,TABN,0
! /PNUM,SVAL,0
! /NUMBER,0
!*
! /PNUM,ELEM,0
! /REPLOT
!*
! /REPLOT,RESIZE

!  Apply displacement boundary condition.
FINISH
/SOL
FLST,2,1,4,ORDE,1
FITEM,2,4
!*
/GO
DL,P51X, ,ALL,0

! Apply X and Y components of load on free end.
FLST,2,samples(9,i,1)-2,1,ORDE,2
FITEM,2,samples(8,i,1)+2
FITEM,2,-(samples(8,i,1)+samples(9,i,1)-1)
/GO
F,P51X,FX,samples(2,i,1)

FLST,2,samples(9,i,1)-2,1,ORDE,2
FITEM,2,samples(8,i,1)+2
FITEM,2,-(samples(8,i,1)+samples(9,i,1)-1)
/GO
F,P51X,FY,samples(3,i,1)

FLST,2,2,1,ORDE,2
FITEM,2,2
FITEM,2,samples(8,i,1)+1
/GO
F,P51X,FX,samples(2,i,1)/2

FLST,2,2,1,ORDE,2
FITEM,2,2
FITEM,2,samples(8,i,1)+1
/GO
F,P51X,FY,samples(3,i,1)/2


FINISH
/SOL
! /STATUS,SOLU
SOLVE
FINISH
/POST1
/SHOW,WIN32C
SET,FIRST
/PLOPTS,INFO,3
/CONTOUR,ALL,18
/PNUM,MAT,1
/NUMBER,1
/REPLOT,RESIZE
PLNSOL,S,EQV
/UIS,ABORT,1
/SHOW,WIN32
/REPLOT,RESIZE
!*
! /DSCALE,ALL,OFF
! /EFACET,1
! PLNSOL, S,EQV, 0,1.0
! /EFACET,1
! PLNSOL, S,EQV, 0,1.0
! /triad,off
! /REPLOT
FINISH

/POST1
! /SHOW,WIN32C
SET,FIRST
/DSCALE,ALL,OFF
/PLOPTS,INFO,3
/PLOPTS,LEG1,0
/PLOPTS,LEG2,1
/PLOPTS,LEG3,0
/PLOPTS,FRAME,0
/PLOPTS,TITLE,0
/PLOPTS,MINM,0
/PLOPTS,FILE,0
/PLOPTS,SPNO,0
/PLOPTS,LOGO,1
/PLOPTS,WINS,1
/PLOPTS,WP,0
/PLOPTS,DATE,0
/TRIAD,OFF
/REPLOT
/REPLOT
!*

*VGET,stress,NODE,,S,EQV
*VGET,displacement_x,NODE,,U,X
*VGET,displacement_y,NODE,,U,Y
suffix = '000000'
number = CHRVAL(i)
filename = 'fea_%STRFILL(suffix,number,6-STRLENG(number)+1)%'
*CFOPEN,filename,'txt'
*VWRITE,stress(1),',',displacement_x(1),',',displacement_y(1)
(F0.0, A, E10.4, A, E10.4)
*CFCLOS

/CLEAR

*ENDDO
